# OpenSim document version 30000
# Edited from: gait9dof18musc_Thelen_BigSpheres.osim
# Author: BH
# Date: 2020-11-18
# Planar walking model with contact geometry and generalized coordinate actuators.
Model gait9dof7act_BigSpheres.osim:
  length_units: meters
  force_units: N
  gravity: 0 -9.80665 0
  credits:
    A planar reduced gait model with 9 degrees of freedom and 18 muscles by Ajay Seth. Adjusted by Carmichael Ong to follow muscle strengths of Handsfield/Rajagopal and changed hamstrings to follow semimembranosus. Ankle passive mechanics based on Weiss, Kearney, and Hunter 1986. Closely based on Delp S.L., Loan J.P., Hoy M.G., Zajac F.E., Topp E.L., Rosen J.M., Thelen D.G., Anderson F.C., Seth A. Notes: 3D, 23 DOF gait model created by D.G. Thelen, Univ. of Wisconsin-Madison, and Ajay Seth, Frank C. Anderson, and Scott L. Delp, Stanford University. Lower extremity joint defintions based on Delp et al. (1990). Low back joint and anthropometry based on Anderson and Pandy (1999, 2001). Planar knee model of Yamaguchi and Zajac (1989). Seth replaced tibia translation constraints with a CustomJoint for the knee and removed the patella to eliminate all kinematic constraints; insertions of the quadrucepts are handled with moving points in the tibia frame as defined by Delp 1990. Number of muscles was reduced by Anderson to improve simulation speed for demonstrations and is not intended to be used in research. License: Creative Commons (CCBY 3.0). You are free to distribute, remix, tweak, and build upon this work, even commercially, as long as you credit us for the original creation. http://creativecommons.org/licenses/by/3.0/ More Information: http://simtk-confluence.stanford.edu:8080/display/OpenSim/Gait+2392+and+2354+Models
  publications:
    Delp, S.L., Loan, J.P., Hoy, M.G., Zajac, F.E., Topp E.L., Rosen, J.M.: An interactive graphics-based model of the lower extremity to study orthopaedic surgical procedures, IEEE Transactions on Biomedical Engineering, vol. 37, pp. 757-767, 1990. Yamaguchi G.T., Zajac F.E.: A planar model of the knee joint to characterize the knee extensor mechanism." J . Biomech. vol. 22. pp. 1-10. 1989. Anderson F.C., Pandy M.G.: A dynamic optimization solution for vertical jumping in three dimensions. Computer Methods in Biomechanics and Biomedical Engineering 2:201-231, 1999. Anderson F.C., Pandy M.G.: Dynamic optimization of human walking. Journal of Biomechanical Engineering 123:381-390, 2001.
  BodySet:
    Body ground: mass=0 mass_center=(0 0 0) inertia_xx=0 inertia_yy=0 inertia_zz=0
    Body pelvis: mass=11.777 mass_center=(-0.0707 0 0) inertia_xx=0.1028 inertia_yy=0.0871 inertia_zz=0.0579
        meshes=(sacrum.vtp pelvis.vtp l_pelvis.vtp)
      PlanarJoint ground_pelvis: parent_body=ground location_in_parent=(0 0 0) location=(0 0 0)
        Coordinate pelvis_tilt: motion_type=rotational default_value=-0.05 range=(-1.570796 1.570796) clamped=false
        Coordinate pelvis_tx: motion_type=translational default_value=0 range=(-5 5) clamped=false
        Coordinate pelvis_ty: motion_type=translational default_value=0.91 range=(-1 2) clamped=false
    Body femur_r: mass=9.3014 mass_center=(0 -0.17 0) inertia_xx=0.1339 inertia_yy=0.0351 inertia_zz=0.1412
        meshes=femur.vtp
      PinJoint hip_r: parent_body=pelvis location_in_parent=(-0.0707 -0.0661 0.0835) location=(0 0 0)
        Coordinate hip_flexion_r: motion_type=rotational default_value=0 range=(-2.094395 2.094395) clamped=false
    Body tibia_r: mass=3.7075 mass_center=(0 -0.1867 0) inertia_xx=0.0504 inertia_yy=0.0051 inertia_zz=0.0511
        meshes=(tibia.vtp fibula.vtp)
      CustomJoint knee_r: parent_body=femur_r location_in_parent=(0 0 0) location=(0 0 0)
        Coordinate knee_angle_r: motion_type=rotational default_value=0 range=(-2.094395 0.1745329) clamped=false
        SpatialTransform: axes_held_at_zero=(rotation2 rotation3 translation3)
          TransformAxis rotation1: coordinates=knee_angle_r axis=(0 0 1) LinearFunction(coefficients=1 0)
          TransformAxis translation1: coordinates=knee_angle_r axis=(1 0 0)
            SimmSpline: x=(-2.0944 -1.74533 -1.39626 -1.0472 -0.698132 -0.349066 -0.174533 0.197344 0.337395 0.490178 1.52146 2.0944)
                y=(-0.0032 0.00179 0.00411 0.0041 0.00212 -0.001 -0.0031 -0.005227 -0.005435 -0.005574 -0.005435 -0.00525)
          TransformAxis translation2: coordinates=knee_angle_r axis=(0 1 0)
            SimmSpline: x=(-2.0944 -1.22173 -0.523599 -0.349066 -0.174533 0.159149 2.0944)
                y=(-0.4226 -0.4082 -0.399 -0.3976 -0.3966 -0.395264 -0.396)
    Body talus_r: mass=0.1 mass_center=(0 0 0) inertia_xx=0.001 inertia_yy=0.001 inertia_zz=0.001 meshes=talus.vtp
      PinJoint ankle_r: parent_body=tibia_r location_in_parent=(0 -0.43 0) location=(0 0 0)
        Coordinate ankle_angle_r: motion_type=rotational default_value=0 range=(-1.570796 1.570796) clamped=false
    Body calcn_r: mass=1.25 mass_center=(0.1 0.03 0) inertia_xx=0.0014 inertia_yy=0.0039 inertia_zz=0.0041
        meshes=foot.vtp
      WeldJoint subtalar_r: parent_body=talus_r location_in_parent=(-0.04877 -0.04195 0.00792) location=(0 0 0)
    Body toes_r: mass=0.2166 mass_center=(0.0346 0.006 -0.0175) inertia_xx=0.0001 inertia_yy=0.0002 inertia_zz=0.0001
        meshes=bofoot.vtp
      WeldJoint mtp_r: parent_body=calcn_r location_in_parent=(0.1788 -0.002 0.00108) location=(0 0 0)
    Body femur_l: mass=9.3014 mass_center=(0 -0.17 0) inertia_xx=0.1339 inertia_yy=0.0351 inertia_zz=0.1412
        meshes=l_femur.vtp
      PinJoint hip_l: parent_body=pelvis location_in_parent=(-0.0707 -0.0661 -0.0835) location=(0 0 0)
        Coordinate hip_flexion_l: motion_type=rotational default_value=0 range=(-2.094395 2.094395) clamped=false
    Body tibia_l: mass=3.7075 mass_center=(0 -0.1867 0) inertia_xx=0.0504 inertia_yy=0.0051 inertia_zz=0.0511
        meshes=(l_tibia.vtp l_fibula.vtp)
      CustomJoint knee_l: parent_body=femur_l location_in_parent=(0 0 0) location=(0 0 0)
        Coordinate knee_angle_l: motion_type=rotational default_value=0 range=(-2.094395 0.1745329) clamped=false
        SpatialTransform: axes_held_at_zero=(rotation2 rotation3 translation3)
          TransformAxis rotation1: coordinates=knee_angle_l axis=(0 0 1) LinearFunction(coefficients=1 0)
          TransformAxis translation1: coordinates=knee_angle_l axis=(1 0 0)
            SimmSpline: x=(-2.0944 -1.74533 -1.39626 -1.0472 -0.698132 -0.349066 -0.174533 0.197344 0.337395 0.490178 1.52146 2.0944)
                y=(-0.0032 0.00179 0.00411 0.0041 0.00212 -0.001 -0.0031 -0.005227 -0.005435 -0.005574 -0.005435 -0.00525)
          TransformAxis translation2: coordinates=knee_angle_l axis=(0 1 0)
            SimmSpline: x=(-2.0944 -1.22173 -0.523599 -0.349066 -0.174533 0.159149 2.0944)
                y=(-0.4226 -0.4082 -0.399 -0.3976 -0.3966 -0.395264 -0.396)
    Body talus_l: mass=0.1 mass_center=(0 0 0) inertia_xx=0.001 inertia_yy=0.001 inertia_zz=0.001 meshes=l_talus.vtp
      PinJoint ankle_l: parent_body=tibia_l location_in_parent=(0 -0.43 0) location=(0 0 0)
        Coordinate ankle_angle_l: motion_type=rotational default_value=0 range=(-1.047198 1.047198) clamped=false
    Body calcn_l: mass=1.25 mass_center=(0.1 0.03 0) inertia_xx=0.0014 inertia_yy=0.0039 inertia_zz=0.0041
        meshes=l_foot.vtp
      WeldJoint subtalar_l: parent_body=talus_l location_in_parent=(-0.04877 -0.04195 -0.00792) location=(0 0 0)
    Body toes_l: mass=0.2166 mass_center=(0.0346 0.006 0.0175) inertia_xx=0.0001 inertia_yy=0.0002 inertia_zz=0.0001
        meshes=l_bofoot.vtp
      WeldJoint mtp_l: parent_body=calcn_l location_in_parent=(0.1788 -0.002 -0.00108) location=(0 0 0)
    Body torso: mass=34.2366 mass_center=(-0.03 0.32 0) inertia_xx=1.4745 inertia_yy=0.7555 inertia_zz=1.4314
        meshes=(hat_spine.vtp hat_jaw.vtp hat_skull.vtp hat_ribs.vtp)
      PinJoint back: parent_body=pelvis location_in_parent=(-0.1007 0.0815 0) location=(0 0 0)
        Coordinate lumbar_extension: motion_type=rotational default_value=-0.139626 range=(-1.570796 1.570796)
            clamped=false locked=true
    Body head: mass=4.5 mass_center=(0 0 0) inertia_xx=0 inertia_yy=0 inertia_zz=0
      WeldJoint back1: parent_body=torso location_in_parent=(0 0.55 0) location=(0 0 0)
  ForceSet:
    CoordinateActuator pelvis: optimal_force=200 coordinate=pelvis_tilt
    CoordinateActuator hip_r: optimal_force=200 coordinate=hip_flexion_r
    CoordinateActuator hip_l: optimal_force=200 coordinate=hip_flexion_l
    CoordinateActuator knee_r: optimal_force=200 coordinate=knee_angle_r
    CoordinateActuator knee_l: optimal_force=200 coordinate=knee_angle_l
    CoordinateActuator ankle_r: optimal_force=200 coordinate=ankle_angle_r
    CoordinateActuator ankle_l: optimal_force=200 coordinate=ankle_angle_l
    HuntCrossleyForce foot_r: transition_velocity=0.1
      ContactParametersSet contact_parameters:
        ContactParameters: geometry=(platform r_heel r_toe) stiffness=600000 dissipation=1.5 static_friction=0.8
            dynamic_friction=0.8 viscous_friction=0
    HuntCrossleyForce foot_l: transition_velocity=0.1
      ContactParametersSet contact_parameters:
        ContactParameters: geometry=(platform l_heel l_toe) stiffness=600000 dissipation=1.5 static_friction=0.8
            dynamic_friction=0.8 viscous_friction=0
    CoordinateLimitForce [values shared by the 6 below unless stated]: upper_stiffness=20 [N*m/degree]
        lower_stiffness=20 [N*m/degree] damping=0.25 transition=10 [degrees]
    CoordinateLimitForce HipLimit_r: coordinate=hip_flexion_r upper_limit=120 [degrees] lower_limit=-30 [degrees]
    CoordinateLimitForce HipLimit_l: coordinate=hip_flexion_l upper_limit=120 lower_limit=-30
    CoordinateLimitForce KneeLimit_r: coordinate=knee_angle_r upper_limit=10 lower_limit=-140
    CoordinateLimitForce KneeLimit_l: coordinate=knee_angle_l upper_limit=10 lower_limit=-140
    CoordinateLimitForce AnkleLimit_r: coordinate=ankle_angle_r upper_limit=20 lower_limit=-40
    CoordinateLimitForce AnkleLimit_l: coordinate=ankle_angle_l upper_limit=20 lower_limit=-40
  ContactGeometrySet:
    ContactHalfSpace platform: body_name=ground location=(0 0 0) orientation=(0 0 -1.570796)
    ContactSphere r_heel: body_name=calcn_r location=(0.03 0.04 0) radius=0.05
    ContactSphere r_toe: body_name=toes_r location=(0.03 0.04 0) radius=0.05
    ContactSphere l_heel: body_name=calcn_l location=(0.03 0.04 0) radius=0.05
    ContactSphere l_toe: body_name=toes_l location=(0.03 0.04 0) radius=0.05
