# OpenSim document version 40000
Model gait9dof7act_BigSpheres.osim-scaled:
  gravity: 0 -9.80665 0
  length_units: meters
  force_units: N
  credits:
    A planar reduced gait model with 9 degrees of freedom and 18 muscles by Ajay Seth. Adjusted by Carmichael Ong to follow muscle strengths of Handsfield/Rajagopal and changed hamstrings to follow semimembranosus. Ankle passive mechanics based on Weiss, Kearney, and Hunter 1986. Closely based on Delp S.L., Loan J.P., Hoy M.G., Zajac F.E., Topp E.L., Rosen J.M., Thelen D.G., Anderson F.C., Seth A. Notes: 3D, 23 DOF gait model created by D.G. Thelen, Univ. of Wisconsin-Madison, and Ajay Seth, Frank C. Anderson, and Scott L. Delp, Stanford University. Lower extremity joint defintions based on Delp et al. (1990). Low back joint and anthropometry based on Anderson and Pandy (1999, 2001). Planar knee model of Yamaguchi and Zajac (1989). Seth replaced tibia translation constraints with a CustomJoint for the knee and removed the patella to eliminate all kinematic constraints; insertions of the quadrucepts are handled with moving points in the tibia frame as defined by Delp 1990. Number of muscles was reduced by Anderson to improve simulation speed for demonstrations and is not intended to be used in research. License: Creative Commons (CCBY 3.0). You are free to distribute, remix, tweak, and build upon this work, even commercially, as long as you credit us for the original creation. http://creativecommons.org/licenses/by/3.0/ More Information: http://simtk-confluence.stanford.edu:8080/display/OpenSim/Gait+2392+and+2354+Models
  publications:
    Delp, S.L., Loan, J.P., Hoy, M.G., Zajac, F.E., Topp E.L., Rosen, J.M.: An interactive graphics-based model of the lower extremity to study orthopaedic surgical procedures, IEEE Transactions on Biomedical Engineering, vol. 37, pp. 757-767, 1990. Yamaguchi G.T., Zajac F.E.: A planar model of the knee joint to characterize the knee extensor mechanism." J . Biomech. vol. 22. pp. 1-10. 1989. Anderson F.C., Pandy M.G.: A dynamic optimization solution for vertical jumping in three dimensions. Computer Methods in Biomechanics and Biomedical Engineering 2:201-231, 1999. Anderson F.C., Pandy M.G.: Dynamic optimization of human walking. Journal of Biomechanical Engineering 123:381-390, 2001.
  Ground
  BodySet:
    Body pelvis: mass=9.520399 [kg] mass_center=(-0.06963508 0 0) inertia=(0.08061781 0.06830555 0.04540633 0 0 0)
        meshes=(sacrum.vtp pelvis.vtp l_pelvis.vtp)
    Body femur_r: mass=7.519151 mass_center=(0 -0.1918896 0) inertia=(0.1379132 0.03615201 0.145432 0 0 0)
        meshes=femur.vtp
    Body tibia_r: mass=2.997103 mass_center=(0 -0.1953863 0) inertia=(0.04462214 0.004515336 0.0452419 0 0 0)
        meshes=(tibia.vtp fibula.vtp)
    Body talus_r: mass=0.08083892 mass_center=(0 0 0) inertia=(0.0004369842 0.0004369842 0.0004369842 0 0 0)
        meshes=talus.vtp
    Body calcn_r: mass=1.010486 mass_center=(0.0735229 0.02205687 0)
        inertia=(0.0006117778 0.001704238 0.001791635 0 0 0) meshes=foot.vtp
    Body toes_r: mass=0.1750971 mass_center=(0.02543892 0.004411374 -0.01286651)
        inertia=(4.369842e-5 8.739684e-5 4.369842e-5 0 0 0) meshes=bofoot.vtp
    Body femur_l: mass=7.519151 mass_center=(0 -0.1918896 0) inertia=(0.1379132 0.03615201 0.145432 0 0 0)
        meshes=l_femur.vtp
    Body tibia_l: mass=2.997103 mass_center=(0 -0.1953863 0) inertia=(0.04462214 0.004515336 0.0452419 0 0 0)
        meshes=(l_tibia.vtp l_fibula.vtp)
    Body talus_l: mass=0.08083892 mass_center=(0 0 0) inertia=(0.0004369842 0.0004369842 0.0004369842 0 0 0)
        meshes=l_talus.vtp
    Body calcn_l: mass=1.010486 mass_center=(0.0735229 0.02205687 0)
        inertia=(0.0006117778 0.001704238 0.001791635 0 0 0) meshes=l_foot.vtp
    Body toes_l: mass=0.1750971 mass_center=(0.02543892 0.004411374 0.01286651)
        inertia=(4.369842e-5 8.739684e-5 4.369842e-5 0 0 0) meshes=l_bofoot.vtp
    Body torso: mass=27.6765 mass_center=(-0.03 0.32 0) inertia=(1.19197 0.610738 1.157128 0 0 0)
        meshes=(hat_spine.vtp hat_jaw.vtp hat_skull.vtp hat_ribs.vtp)
    Body head: mass=3.637751 mass_center=(0 0 0) inertia=(0 0 0 0 0 0)
  JointSet:
    PlanarJoint ground_pelvis: socket_parent_frame=ground_offset socket_child_frame=pelvis_offset
      Coordinate pelvis_tilt: default_value=-0.05 range=(-1.570796 1.570796) clamped=false
      Coordinate pelvis_tx: default_value=0 range=(-5 5) clamped=false
      Coordinate pelvis_ty: default_value=0.91 range=(-1 2) clamped=false
      PhysicalOffsetFrame ground_offset: socket_parent=/ground translation=(0 0 0) [meters]
      PhysicalOffsetFrame pelvis_offset: socket_parent=/bodyset/pelvis translation=(0 0 0)
    PinJoint hip_r: socket_parent_frame=pelvis_offset socket_child_frame=femur_r_offset
      Coordinate hip_flexion_r: default_value=0 range=(-2.094395 2.094395) clamped=false
      PhysicalOffsetFrame pelvis_offset: socket_parent=/bodyset/pelvis translation=(-0.06963508 -0.06510437 0.08224228)
      PhysicalOffsetFrame femur_r_offset: socket_parent=/bodyset/femur_r translation=(0 0 0)
    CustomJoint knee_r: socket_parent_frame=femur_r_offset socket_child_frame=tibia_r_offset
      Coordinate knee_angle_r: default_value=0 range=(-2.094395 0.1745329) clamped=false
      PhysicalOffsetFrame femur_r_offset: socket_parent=/bodyset/femur_r translation=(0 0 0)
      PhysicalOffsetFrame tibia_r_offset: socket_parent=/bodyset/tibia_r translation=(0 0 0)
      SpatialTransform: axes_held_at_zero=(rotation2 rotation3 translation3)
        TransformAxis rotation1: coordinates=knee_angle_r axis=(0 0 1) LinearFunction(coefficients=1 0)
        TransformAxis translation1: coordinates=knee_angle_r axis=(1 0 0)
          MultiplierFunction: scale=1.128762
            SimmSpline: x=(-2.0944 -1.74533 -1.39626 -1.0472 -0.698132 -0.349066 -0.174533 0.197344 0.337395 0.490178 1.52146 2.0944)
                y=(-0.0032 0.00179 0.00411 0.0041 0.00212 -0.001 -0.0031 -0.005227 -0.005435 -0.005574 -0.005435 -0.00525)
        TransformAxis translation2: coordinates=knee_angle_r axis=(0 1 0)
          MultiplierFunction: scale=1.128762
            SimmSpline: x=(-2.0944 -1.22173 -0.523599 -0.349066 -0.174533 0.159149 2.0944)
                y=(-0.4226 -0.4082 -0.399 -0.3976 -0.3966 -0.395264 -0.396)
    PinJoint ankle_r: socket_parent_frame=tibia_r_offset socket_child_frame=talus_r_offset
      Coordinate ankle_angle_r: default_value=0 range=(-1.570796 1.570796) clamped=false
      PhysicalOffsetFrame tibia_r_offset: socket_parent=/bodyset/tibia_r translation=(0 -0.4500058 0)
      PhysicalOffsetFrame talus_r_offset: socket_parent=/bodyset/talus_r translation=(0 0 0)
    WeldJoint subtalar_r: socket_parent_frame=talus_r_offset socket_child_frame=calcn_r_offset
      PhysicalOffsetFrame talus_r_offset: socket_parent=/bodyset/talus_r
          translation=(-0.03585712 -0.03084286 0.005823013)
      PhysicalOffsetFrame calcn_r_offset: socket_parent=/bodyset/calcn_r translation=(0 0 0)
    WeldJoint mtp_r: socket_parent_frame=calcn_r_offset socket_child_frame=toes_r_offset
      PhysicalOffsetFrame calcn_r_offset: socket_parent=/bodyset/calcn_r
          translation=(0.1314589 -0.001470458 0.0007940473)
      PhysicalOffsetFrame toes_r_offset: socket_parent=/bodyset/toes_r translation=(0 0 0)
    PinJoint hip_l: socket_parent_frame=pelvis_offset socket_child_frame=femur_l_offset
      Coordinate hip_flexion_l: default_value=0 range=(-2.094395 2.094395) clamped=false
      PhysicalOffsetFrame pelvis_offset: socket_parent=/bodyset/pelvis
          translation=(-0.06963508 -0.06510437 -0.08224228)
      PhysicalOffsetFrame femur_l_offset: socket_parent=/bodyset/femur_l translation=(0 0 0)
    CustomJoint knee_l: socket_parent_frame=femur_l_offset socket_child_frame=tibia_l_offset
      Coordinate knee_angle_l: default_value=0 range=(-2.094395 0.1745329) clamped=false
      PhysicalOffsetFrame femur_l_offset: socket_parent=/bodyset/femur_l translation=(0 0 0)
      PhysicalOffsetFrame tibia_l_offset: socket_parent=/bodyset/tibia_l translation=(0 0 0)
      SpatialTransform: axes_held_at_zero=(rotation2 rotation3 translation3)
        TransformAxis rotation1: coordinates=knee_angle_l axis=(0 0 1) LinearFunction(coefficients=1 0)
        TransformAxis translation1: coordinates=knee_angle_l axis=(1 0 0)
          MultiplierFunction: scale=1.128762
            SimmSpline: x=(-2.0944 -1.74533 -1.39626 -1.0472 -0.698132 -0.349066 -0.174533 0.197344 0.337395 0.490178 1.52146 2.0944)
                y=(-0.0032 0.00179 0.00411 0.0041 0.00212 -0.001 -0.0031 -0.005227 -0.005435 -0.005574 -0.005435 -0.00525)
        TransformAxis translation2: coordinates=knee_angle_l axis=(0 1 0)
          MultiplierFunction: scale=1.128762
            SimmSpline: x=(-2.0944 -1.22173 -0.523599 -0.349066 -0.174533 0.159149 2.0944)
                y=(-0.4226 -0.4082 -0.399 -0.3976 -0.3966 -0.395264 -0.396)
    PinJoint ankle_l: socket_parent_frame=tibia_l_offset socket_child_frame=talus_l_offset
      Coordinate ankle_angle_l: default_value=0 range=(-1.047198 1.047198) clamped=false
      PhysicalOffsetFrame tibia_l_offset: socket_parent=/bodyset/tibia_l translation=(0 -0.4500058 0)
      PhysicalOffsetFrame talus_l_offset: socket_parent=/bodyset/talus_l translation=(0 0 0)
    WeldJoint subtalar_l: socket_parent_frame=talus_l_offset socket_child_frame=calcn_l_offset
      PhysicalOffsetFrame talus_l_offset: socket_parent=/bodyset/talus_l
          translation=(-0.03585712 -0.03084286 -0.005823013)
      PhysicalOffsetFrame calcn_l_offset: socket_parent=/bodyset/calcn_l translation=(0 0 0)
    WeldJoint mtp_l: socket_parent_frame=calcn_l_offset socket_child_frame=toes_l_offset
      PhysicalOffsetFrame calcn_l_offset: socket_parent=/bodyset/calcn_l
          translation=(0.1314589 -0.001470458 -0.0007940473)
      PhysicalOffsetFrame toes_l_offset: socket_parent=/bodyset/toes_l translation=(0 0 0)
    PinJoint back: socket_parent_frame=pelvis_offset socket_child_frame=torso_offset
      Coordinate lumbar_extension: default_value=-0.139626 range=(-1.570796 1.570796) clamped=false locked=true
      PhysicalOffsetFrame pelvis_offset: socket_parent=/bodyset/pelvis translation=(-0.09918321 0.08027241 0)
      PhysicalOffsetFrame torso_offset: socket_parent=/bodyset/torso translation=(0 0 0)
    WeldJoint back1: socket_parent_frame=torso_offset socket_child_frame=head_offset
      PhysicalOffsetFrame torso_offset: socket_parent=/bodyset/torso translation=(0 0.55 0)
      PhysicalOffsetFrame head_offset: socket_parent=/bodyset/head translation=(0 0 0)
  ForceSet:
    CoordinateActuator pelvis: coordinate=pelvis_tilt optimal_force=1
    CoordinateActuator hip_r: coordinate=hip_flexion_r optimal_force=1
    CoordinateActuator hip_l: coordinate=hip_flexion_l optimal_force=1
    CoordinateActuator knee_r: coordinate=knee_angle_r optimal_force=1
    CoordinateActuator knee_l: coordinate=knee_angle_l optimal_force=1
    CoordinateActuator ankle_r: coordinate=ankle_angle_r optimal_force=1
    CoordinateActuator ankle_l: coordinate=ankle_angle_l optimal_force=1
    HuntCrossleyForce foot_r: transition_velocity=0.1
      ContactParametersSet contact_parameters:
        ContactParameters: geometry=(platform r_heel r_toe) stiffness=600000 dissipation=1.5 static_friction=0.8
            dynamic_friction=0.8 viscous_friction=0
    HuntCrossleyForce foot_l: transition_velocity=0.1
      ContactParametersSet contact_parameters:
        ContactParameters: geometry=(platform l_heel l_toe) stiffness=600000 dissipation=1.5 static_friction=0.8
            dynamic_friction=0.8 viscous_friction=0
    CoordinateLimitForce [values shared by the 6 below unless stated]: upper_stiffness=20 [N*m/degree]
        lower_stiffness=20 [N*m/degree] damping=0.25 transition=10 [degrees]
    CoordinateLimitForce HipLimit_r: coordinate=hip_flexion_r upper_limit=120 [degrees] lower_limit=-30 [degrees]
    CoordinateLimitForce HipLimit_l: coordinate=hip_flexion_l upper_limit=120 lower_limit=-30
    CoordinateLimitForce KneeLimit_r: coordinate=knee_angle_r upper_limit=10 lower_limit=-140
    CoordinateLimitForce KneeLimit_l: coordinate=knee_angle_l upper_limit=10 lower_limit=-140
    CoordinateLimitForce AnkleLimit_r: coordinate=ankle_angle_r upper_limit=20 lower_limit=-40
    CoordinateLimitForce AnkleLimit_l: coordinate=ankle_angle_l upper_limit=20 lower_limit=-40
  MarkerSet:
    Marker RGTR: femur_r (-0.01557141 -0.02902674 0.08073284)
    Marker LGTR: femur_l (-0.01557139 -0.02902668 -0.0807328)
    Marker RPSIS: pelvis (-0.1500462 0.03756858 0.05406412)
    Marker LPSIS: pelvis (-0.1500464 0.03756857 -0.05406411)
    Marker RASIS: pelvis (0.00778028 0.01120765 0.1247727)
    Marker LASIS: pelvis (0.007780278 0.0112076 -0.1247729)
    Marker KNEE_LAT: femur_l (-0.004574481 -0.4560398 -0.05112599)
    Marker KNEE_MED: femur_l (0.005240919 -0.4533769 0.05230502)
    Marker ANKLE: tibia_l (-0.003755657 -0.4301897 -0.05488348)
    Marker ANKLE_MED: tibia_l (0.00713563 -0.4073281 0.03784258)
    Marker FOOT_MED: calcn_l (0.1635628 -0.003801083 0.02840305)
    Marker FOOT_LAT: toes_l (-0.006975543 -0.002080081 -0.04348718)
  ContactGeometrySet:
    ContactHalfSpace platform: socket_frame=/ground location=(0 0 0) orientation=(0 0 -1.570796)
    ContactSphere r_heel: socket_frame=/bodyset/calcn_r location=(0.03 0.04 0) radius=0.05
    ContactSphere r_toe: socket_frame=/bodyset/toes_r location=(0.03 0.04 0) radius=0.05
    ContactSphere l_heel: socket_frame=/bodyset/calcn_l location=(0.03 0.04 0) radius=0.05
    ContactSphere l_toe: socket_frame=/bodyset/toes_l location=(0.03 0.04 0) radius=0.05
